# AguaClara Water Treatment Plants
# Design References
# MathCAD dimension calculations:
# [reference: BasicInputs.xmcd]
# Uses BasicClientInputs when this is run by LabVIEW.
# Use BasicInputs to use the program in MathCAD
# Change the reference by
# - right clicking
# - select properties
# - reference tab
# - type in the correct file name
# [reference: ExpertInputs.xmcd]
# [reference: MathFunctions.xmcd]
# [reference: PipeDatabase.xmcd]
# [reference: MinorLossCoefficients.xmcd]
# [reference: FluidsFunctions.xmcd]
# [reference: Sedimentation Tank.xmcd]
# [reference: Flocculator.xmcd]
# [reference: LFOM.xmcd]
# [reference: LinearCdc_app37.xmcd]
# [reference: ChemStorageCylinders.xmcd]
# [reference: EntranceTankDim.xmcd]
# [reference: Stacked Rapid Sand Filter.xmcd]
# [reference: Materials List.xmcd]
# [reference: Drain Channel Design.xmcd]
# AutoCAD drawing programs:
# Translators:
# These are the codes that take MathCAD outputs and create AutoCAD scripts that are used to draw the plant (formerly Basics)
# [reference: MtoATranslators.xmcd]
# The wrapped MtoA translator contains the functions that the user will want to access. These functions will draw pieces with full functionality - specifying the location, dimension, and orientation of the object. Also, it contains layer control and subtraction capabilities for grouped objects.
# [reference: MtoATranslators Wrapped.xmcd]
# Plant Elements:
# These are all of the files that draw the fundamental parts of the plants (tees, elbows, tanks, pipes, etc)
# [reference: Channel.xmcd]
# [reference: cross.xmcd]
# [reference: Sludge.xmcd]
# [reference: Manifold.xmcd]
# [reference: pipe.xmcd]
# [reference: elbow.xmcd]
# [reference: tank.xmcd]
# [reference: adapter.xmcd]
# [reference: Tee.xmcd]
# [reference: pvccap.xmcd]
# [reference: LaunderCap.xmcd]
# [reference: ChimneyStops.xmcd]
# [reference: laminaplain.xmcd]
# [reference: Stairs.xmcd]
# [reference: DrainChannel.xmcd]
# [reference: Manifold.xmcd]
# Specific Pieces:
# These are the codes that draw the bigger pieces of the plant (the sed tank, floc tank, etc)
# [reference: floctank.xmcd]
# [reference: SedTank- with pieces.xmcd]
# [reference: Entrance Tank.xmcd]
# [reference: ChemStockCylinders.xmcd]
# [reference: SRSF.xmcd]
# [reference: Operator Access.xmcd]
# [reference: Plant Drain Channel Update mb869.xmcd]
# Layouts:
# This file will execute at the very end to create multiple views of the entire plant in paperspace
# [reference: Layouts.xmcd]
# Sedimentation
# Sed Tanks and Slopes:
N_SedTanks = 4
H_SedBetween = 0 cm  # Distance from the top of the inlet manifold to the bottom of the ledge supporting the lamella frame
L_Sed = 3.50748 m
N_SedBays = 1  # Number of bays of inlet manifolds in each sed tank
# Length of the port through which water exits the inlet manifold
# Width of ferrous cement plates in whice one manifold port is cut
Q_SedBay = 3 L/s
# Sedimentation Tank Sludge Drain:
N_SedSludgeOrifices = 35  # per cell
Ti_SludgeDrain = 30 min  # Tank Drain time
W_SedSludge = 9.63685 cm  # Width of the sludge channel
B_SedSludgeOrifices = 10 cm  # Distance center to center between drain orifices
# Depth of the sludge channel
H_SedSludge = 4.81842 cm
T_SedSludge = 5 cm
# Thickness of the plate topping the sludge channel
# through which drain holes are formed
T_SedSludge = 5 cm
W_SedDrainCover = 19.6368 cm
D_SedSludgeOrifice = 0.011 m  # Diameter of drain orifices
W_SedInletBottom = 0.441816 m
N_SedSludgeOrifices = 35
ND_SedSludgeValve = 2 in
# Sedimentation Tank Dimensions:
Z_SedSludge = 0.0981842 m  # Height from 0 of the top of the sludge drain
# Height from 0 of the top of the inlet manifold
Z_SedSlopes = 0.82013 m  # Total tank wall height
W_Sed = 1.08 m
L_Sed = 3.50748 m  # Total tank length
# Inlet Channel:
HW_InletChannel = 0.255049 m  # Width of the drop chimneys connecting channel to sed inlet manifolds
W_InletChannel = 0.405049 m  # length of drop chimmneys
L_Channel = 5.07 m
# per sed bay
N_SedInletPipes =  # error: This variable is undefined.
H_InletChannel = 0.355049 m
# Sedimentation Tank Effluent Launder:
N_SedLaunderOrifices = 44  # Number of orifices per launder  # More Launder Dimensions
ND_SedLaunder = 4 in
Q_SedLaunderOrifices = 7.12829e-5 m^3/s
# Center to center launder spacing
L_SedLaunder = 2.39129 m
B_SedLaunderOrifices = 0.10219 m
D_SedLaunderOrifice = 0.511811 in
# Exit Channel:
W_ExitChannel = 0.3532 m
H_ExitChannel = 0.355049 m
L_ExitChannel = 5.07 m
H_PltWeir = 0.265049 m  # height of the weir carrying water to the distribution tank
HW_ExitChannel = 0.215049 m  # water height in exit channel from 0
# Lamella:
L_SedPlate = 0.609667 m  # center to center distance between lamella
B_SedPlate = 2.87961 cm  # spacing between lamella
S_SedPlate = 2.67961 cm
N_SedPlates = 70  # Number of Sed Plates per Sedimentation Tank Bay.
AN_SedPlate = 60 deg
V_SedC = 10.2109 m/day
L_SedActive = 2.32756 m
V_SedUp = 68.4251 m/day
Z_SedLaunder = 1.54353 m
H_SedPlate = 0.527987 m
H_SedAbove = 0.166043 m  # Height of water needed above the lamella
N_SedPlates = 70
HW_Sed = 1.65242 m
H_Sed = 1.75242 m
Z_Mp = 1.39737 m
H_SedBayDivider = 0.82013 m
# Flocculator
# Look at Flocculator Positioning arrays
W_FlocChannel = 0.6 m
# Fill last channel with bafffles from last channel
ED_Floc = 10 mW/kg
# Fix port width to be based on energy dissipation in that channel
# Adjust spacing after the number of baffles per channel is known.
HW_FlocEnd = 1.65242 m
# Check the residence time of the flocculator should be at least 20minutes
X_FlocBaffles = [
    0.162562, 0.162562, 0.162562, 0.275049;
    0.307124, 0.307124, 0.307124, 0.421138;
    0.451686, 0.451686, 0.451686, 0.567227;
    0.596247, 0.596247, 0.596247, 0.713316;
    0.740809, 0.740809, 0.740809, 0.859406;
    0.885371, 0.885371, 0.885371, 1.00549;
    1.02993, 1.02993, 1.02993, 1.15158;
    1.17449, 1.17449, 1.17449, 1.29767;
    1.31906, 1.31906, 1.31906, 1.44376;
    1.46362, 1.46362, 1.46362, 1.58985;
    1.60818, 1.60818, 1.60818, 1.73594;
    1.75274, 1.75274, 1.75274, 1.88203;
    1.8973, 1.8973, 1.8973, 2.02812;
    2.04187, 2.04187, 2.04187, 2.17421;
    2.18643, 2.18643, 2.18643, 2.3203;
    2.33099, 2.33099, 2.33099, 2.46639;
    2.47555, 2.47555, 2.47555, 2.61248;
    2.62011, 2.62011, 2.62011, 2.75857;
    2.76468, 2.76468, 2.76468, 2.90465;
    2.90924, 2.90924, 2.90924, 3.05074;
    3.0538, 3.0538, 3.0538, 3.19683;
    3.19836, 3.19836, 3.19836, 3.34292;
    3.34292, 3.34292, 3.34292, 0
] m
L_FlocBaffles = [
    1.43858, 1.43858, 1.43858, 1.67826;
    1.67826, 1.67826, 1.67826, 1.43858;
    1.43858, 1.43858, 1.43858, 1.67826;
    1.67826, 1.67826, 1.67826, 1.43858;
    1.43858, 1.43858, 1.43858, 1.67826;
    1.67826, 1.67826, 1.67826, 1.43858;
    1.43858, 1.43858, 1.43858, 1.67826;
    1.67826, 1.67826, 1.67826, 1.43858;
    1.43858, 1.43858, 1.43858, 1.67826;
    1.67826, 1.67826, 1.67826, 1.43858;
    1.43858, 1.43858, 1.43858, 1.67826;
    1.67826, 1.67826, 1.67826, 1.43858;
    1.43858, 1.43858, 1.43858, 1.67826;
    1.67826, 1.67826, 1.67826, 1.43858;
    1.43858, 1.43858, 1.43858, 1.67826;
    1.67826, 1.67826, 1.67826, 1.43858;
    1.43858, 1.43858, 1.43858, 1.67826;
    1.67826, 1.67826, 1.67826, 1.43858;
    1.43858, 1.43858, 1.43858, 1.67826;
    1.67826, 1.67826, 1.67826, 1.43858;
    1.43858, 1.43858, 1.43858, 1.67826;
    1.67826, 1.67826, 1.67826, 1.43858;
    1.43858, 1.43858, 1.43858, 0
] m
Z_FlocBaffles = [
    0, 0, 0, 0.216134;
    0.213843, 0.213843, 0.213843, 0;
    0, 0, 0, 0.216134;
    0.213843, 0.213843, 0.213843, 0;
    0, 0, 0, 0.216134;
    0.213843, 0.213843, 0.213843, 0;
    0, 0, 0, 0.216134;
    0.213843, 0.213843, 0.213843, 0;
    0, 0, 0, 0.216134;
    0.213843, 0.213843, 0.213843, 0;
    0, 0, 0, 0.216134;
    0.213843, 0.213843, 0.213843, 0;
    0, 0, 0, 0.216134;
    0.213843, 0.213843, 0.213843, 0;
    0, 0, 0, 0.216134;
    0.213843, 0.213843, 0.213843, 0;
    0, 0, 0, 0.216134;
    0.213843, 0.213843, 0.213843, 0;
    0, 0, 0, 0.216134;
    0.213843, 0.213843, 0.213843, 0;
    0, 0, 0, 0.216134;
    0.213843, 0.213843, 0.213843, 0;
    0, 0, 0, 0
] m
N_FlocChannels = 4
L_FlocTank = 14.0299 m
HL_Floc = 18.9685 cm
HW_FlocStart = 1.8421 m
S_FlocBaffle = [14.2562; 14.2562; 14.2562; 14.4089] cm
B_FlocBaffle = [14.4562; 14.4562; 14.4562; 14.6089] cm
N_FlocChannelBaffles = [23; 23; 23; 22]
W_FlocPort = [0.142562; 0.142562; 0.142562; 0.150586] m
HL_FlocChannels = [4.81664; 4.81664; 4.81664; 4.5186] cm
L_FlocBaffleLower = 1.43858 m
L_FlocBaffleUpper = 1.67826 m
H_FlocPort = [0.6; 0.6; 0.6; 0.574113] m
Ti_Floc = 19.3195 min  # residence time of the flocculator
N_FlocBaffles = 91
# Materials List
N_Launders = 4
L_LaunderPipeTotal = 9.56517 m
N_Valves = 4
N_LaunderCouplings = 4
N_ValveCouplings = 4
N_SedPlatesTotal = 280
N_SedPlatesPerSheet = 6
N_SedPlateSheets = 47
# AutoCAD Scripts
AC_SedTank =  # no stored result
AC_EntranceTank = [
    "-layer m Cdc"; "c t 129,0,129"; "Cdc"; "  "; "-insert CdcLeverArm.dwg"; "-3.61383,10.3828,2.30392 x 1 1  0"; "-insert CdcLeverArmBracket.dwg"; "-3.58183,9.97005,2.27902 x 1 1  0"; "-insert CdcCht.dwg"; "-4.34403,9.88595,2.39672 x 1 1  0"
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]
AC_FlocTank = [
    "-layer m FlocTankCon"; "c t 132,132,132"; "FlocTankCon"; "  "; "_-view o t _zoom w 0.16,4.76,0 -3.66748,7.93,1.9421 _box 0,4.92,0 -3.50748,7.77,1.9421 _box 0.15,4.77,-0.15 -3.65748,7.92,1.9421 _subtract 0.15,4.77,-0.15  0,4.92,0 "; "_box -3.65748,5.52,0 0.15,5.67,1.9421"; "-array l  R 3 1 0.75"; "-group c FlocTankCon y "; "all "; "-layer s 0"
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]
AC_ChemTanks = [
    "-layer m EtCdcCoagtanks"; "c t 132,132,132"; "EtCdcCoagtanks"; "  "; "_-view o t"; "_zoom w -5.05463,10.10215,1.35752 -4.26263,10.89415,2.60172"; "_cylinder -4.65863,10.49815,2.59172 0.386 c -5.88283,10.49815,2.59172"; "rotate3d l  y -4.65863,10.49815,2.59172 90"; "-group c EtCdcCoagtanks y "; "all "
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]
AC_OperatorAccess = [
    "-layer m OpCoagplatformCon"; "c t 132,132,132"; "OpCoagplatformCon"; "  "; "_-view o f"; "_pline"; "-6.57863,2.59172"; "-6.27863,2.59172"; "-6.27863,2.40039"; "-5.97863,2.40039"
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]
AC_DrainChannel = [
    "-layer m DrainChannel"; "c t 214,214,214"; "DrainChannel"; "  "; "3dpoly"; "0,0.172,-0.15"; "0,0.172,-0.46204"; "0,1.472,-0.46204"; "0,1.472,-0.15"; "0,0.172,-0.15 "
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]
AC_Layout = [
    "layout s TopView"; ".ms"; "z o all "; "layout s FrontView"; ".ms"; "z o all "; "layout s RightView"; ".ms"; "z o all "; "layout s TopViewEt"
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]
AC_Filter =  # no stored result
# [component: inputs AC_SedTank]
